f(x) := 2*x^3 + 3*x^2 + 4*x + 5  # Заданная функция
x1 := root(f(x), x, -10, 0) = -1.37113
# Нахождение действительных корней через
# функцию root()
# График функции f(x) на промежутке [-10,10]
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f(x) solve →  # no stored result; disabled
v := f(x) coeffs → [5; 4; 3; 2]
# Нахождение коэффициетов
# полинома
polyroots(v) = [-1.37113; -0.0644328 - 1.34876i; -0.0644328 + 1.34876i]  # Все корни уравнения
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# График функции f(x) на промежутке [x-0.5,x+0.5]
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f(x) solve → [
    (2771/1728 - 7*sqrt(1086)/144)^(1/3)/(sqrt(1086)/36 - 7/8)^(1/3) - 5/(12*(sqrt(1086)/36 - 7/8)^(1/3)) - 1/2;
    (5 - 12*(2771/1728 - 7*sqrt(1086)/144)^(1/3) - 12*(sqrt(1086)/36 - 7/8)^(1/3) + 5i*sqrt(3) + 12i*sqrt(3)*(2771/1728 - 7*sqrt(1086)/144)^(1/3))/(24*(sqrt(1086)/36 - 7/8)^(1/3));
    -(12*(sqrt(1086)/36 - 7/8)^(1/3) + 12*(2771/1728 - 7*sqrt(1086)/144)^(1/3) - 5 + 5i*sqrt(3) + 12i*sqrt(3)*(2771/1728 - 7*sqrt(1086)/144)^(1/3))/(24*(sqrt(1086)/36 - 7/8)^(1/3))
]
