# Задание №2
n := 10
i := 0, 1 .. 2*n
X[i] := 2*π*i/(2*n + 1)
# Кусочно-линейная интерполяция
scale := 100
j := 0 .. scale
t[j] := min(X) + j*(max(X) - min(X))/scale
Y := [-3.00; -3.58; -4.12; -4.56; -4.86; -4.99; -4.94; -4.73; -4.36; -3.86; -3.30; -2.70; -2.13; -1.64; -1.26; -1.05; -1.00; -1.13; -1.43; -1.87; -2.43]
X = [0; 0.299199; 0.598399; 0.897598; 1.1968; 1.496; 1.7952; 2.0944; 2.39359; 2.69279; 2.99199; 3.29119; 3.59039; 3.88959; 4.18879; 4.48799; 4.78719; 5.08639; 5.38559; 5.68479; 5.98399]
fintl(t) := linterp(X, Y, t)
# Интерполяция кубическим слайном
S := cspline(X, Y)
fints(t) := interp(S, X, Y, t)
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