# Задание №3
# Исходная матрица | Вектор-столбец свободных членов
A := [1.54, 1.70, 1.62; 3.69, 3.73, 3.59; 2.45, 2.43, 2.25]
B := [-1.97; -3.74; -2.26]
# Решение СЛАУ
X := A^-1*B = [1.98198; -2.03961; -0.959828]
lsolve(A, B) = [1.98198; -2.03961; -0.959828]
Given
x := 0
y := 0
z := 0
1.54*x + 1.70*y + 1.62*z == -1.97
3.69*x + 3.73*y + 3.59*z == -3.74
2.45*x + 2.43*y + 2.25*z == -2.26
res := Find(x, y, z)
res = [1.98198; -2.03961; -0.959828]
